l1 := 0.059
fi := 0, 0.1 .. 2*π
f := 0, π/6 .. 2*π
l2 := 0.265
# здесь задаётся угол
# <Начальное значение>,<нач.знач.+шаг>..<конечное значение>
# символ ".." задается кнопкой ";"(на букве ж)
λs2 := 0.3
λ2 := 4.5
xc(f) := l1*cos(f) + l2*sqrt(1 - (sin(f)*l1/l2)^2)
yd(f) := l1*cos(π/2 - f) + l2*sqrt(1 - (sin(π/2 - f)*l1/l2)^2)
Vqc(f) := d/df(xc(f))
Vqd(f) := d/df(yd(f))
f*180/π = [0; 30; 60; 90; 120; 150; 180; 210; 240; 270; 300; 330; 360]
Vqc(f) = [0; -0.0352236; -0.0568923; -0.059; -0.0452987; -0.0237764; 0; 0.0237764; 0.0452987; 0.059; 0.0568923; 0.0352236; 0]
Vqd(f) = [0.059; 0.0568923; 0.0352236; 0; -0.0352236; -0.0568923; -0.059; -0.0452987; -0.0237764; 0; 0.0237764; 0.0452987; 0.059]
Ys4(f) := l1*cos(π/2 - f) + λs2*l2*sqrt(1 - (sin(π/2 - f)*l1/l2)^2)
Vqs4_y(f) := d/df(Ys4(f))
Xs2(f) := l1*cos(f) + λs2*l2*sqrt(1 - (sin(f)*l1/l2)^2)
Xs4(f) := l1*cos(f)*(1 - λs2)
Vqs2_x(f) := d/df(Xs2(f))
Vqs4_x(f) := d/df(Xs4(f))
Ys2(f) := l1*sin(f)*(1 - λs2)
Vqs2_y(f) := d/df(Ys2(f))
Vqs4(f) := sqrt(Vqs4_x(f)^2 + Vqs4_y(f)^2)
Vqs2(f) := sqrt(Vqs2_y(f)^2 + Vqs2_x(f)^2)
f2(f) := asin(-l1/l2*sin(f))
f4(f) := acos(-l1/l2*cos(f))
wq2(f) := d/df(f2(f))
wq4(f) := d/df(f4(f))
f*180/π = [0; 30; 60; 90; 120; 150; 180; 210; 240; 270; 300; 330; 360]
Vqs2(f) = [0.0413; 0.0474739; 0.0567266; 0.059; 0.0535022; 0.0452897; 0.0413; 0.0452897; 0.0535022; 0.059; 0.0567266; 0.0474739; 0.0413]
f*180/π = [0; 30; 60; 90; 120; 150; 180; 210; 240; 270; 300; 330; 360]
Vqs4(f) = [0.059; 0.0567266; 0.0474739; 0.0413; 0.0474739; 0.0567266; 0.059; 0.0535022; 0.0452897; 0.0413; 0.0452897; 0.0535022; 0.059]
# не нужно для первого листа:
aq_c(f) := d^2/df^2(xc(f))
aq_s2_x(f) := d^2/df^2(Xs2(f))
aq_s4_x(f) := d^2/df^2(Xs4(f))
aq_d(f) := d^2/df^2(yd(f))
aq_s2_y(f) := d^2/df^2(Ys2(f))
aq_s4_y(f) := d^2/df^2(Ys4(f))
Js2 := 0.023
m2 := 8
G2 := m2*9.81 = 78.48  # Н
G4 := G2
m3 := 11
G3 := m3*9.81 = 107.91  # Н
G5 := G3
m4 := m2 = 8
m5 := m3 = 11
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# ГРАФИКИ СТРОИТЬ ПО 60 ТОЧКАМ!
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wq4(f) = [0; -0.11345; -0.194019; -0.222642; -0.194019; -0.11345; 0; 0.11345; 0.194019; 0.222642; 0.194019; 0.11345; 0]
wq2(f) = [-0.222642; -0.194019; -0.11345; 0; 0.11345; 0.194019; 0.222642; 0.194019; 0.11345; 0; -0.11345; -0.194019; -0.222642]
# *Дело в том что из-за малого количества точке данный график не верный
# Угол наклона касательной в экстремуме должен быть 0. А этот график слишком
# угловатый
# НЕВЕРНО!: | Определение приведенного момента от внешних сил:
135*π/180 = 2.35619
Vqs4_y(f) = [0.059; 0.0528345; 0.0312171; 0; -0.0312171; -0.0528345; -0.059; -0.0493565; -0.0277829; 0; 0.0277829; 0.0493565; 0.059]
Vqs4_x(f) = [0; -0.02065; -0.0357668; -0.0413; -0.0357668; -0.02065; 0; 0.02065; 0.0357668; 0.0413; 0.0357668; 0.02065; 0]
Vqs2_x(f) = [0; -0.0312171; -0.0528345; -0.059; -0.0493565; -0.0277829; 0; 0.0277829; 0.0493565; 0.059; 0.0528345; 0.0312171; 0]
Vqs2_y(f) = [0.0413; 0.0357668; 0.02065; 0; -0.02065; -0.0357668; -0.0413; -0.0357668; -0.02065; 0; 0.02065; 0.0357668; 0.0413]
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f := 0, π/30 .. 2*π  # точки для построения графиков:
Vqs2(f) = [
    0.0413; 0.041597; 0.0424589; 0.0438052; 0.0455205; 0.0474739; 0.049535; 0.0515845; 0.0535193; 0.0552553
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]
f*180/π = [
    0; 6; 12; 18; 24; 30; 36; 42; 48; 54
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]
Vqc(f) = [
    0; -0.0075331; -0.0149411; -0.0221017; -0.0288985; -0.0352236; -0.04098; -0.0460844; -0.0504688; -0.0540823
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]
Vqd(f) = [
    0.059; 0.0600771; 0.0604478; 0.0600624; 0.0588843; 0.0568923; 0.0540823; 0.0504688; 0.0460844; 0.04098
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]
Vqs4(f) = [
    0.059; 0.0592544; 0.0591583; 0.0587015; 0.0578857; 0.0567266; 0.0552553; 0.0535193; 0.0515845; 0.049535
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]
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wq2(f) = [
    -0.222642; -0.221482; -0.21801; -0.212248; -0.204232; -0.194019; -0.181683; -0.167322; -0.151058; -0.133041
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]
wq4(f) = [
    0; -0.0238647; -0.0474281; -0.0703962; -0.0924898; -0.11345; -0.133041; -0.151058; -0.167322; -0.181683
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]
f*180/π - 60 = [
    -60; -54; -48; -42; -36; -30; -24; -18; -12; -6
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]
# ПРИВЕДЕННЫЙ МОМЕНТ ИНЕРЦИИ ВТОРОЙ ГРУППЫ ЗВЕНЬЕВ
J5(f) := m3*Vqd(f)^2
J3(f) := m3*Vqc(f)^2
J3(f) = [
    0; 0.000624223; 0.00245559; 0.00537334; 0.00918637; 0.0136477; 0.0184729; 0.0233615; 0.0280181; 0.0321739
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]
J5(f) = [
    0.038291; 0.0397018; 0.0401933; 0.0396825; 0.038141; 0.035604; 0.0321739; 0.0280181; 0.0233615; 0.0184729
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]
J2(f) := m2*Vqs2(f)^2 + Js2*wq2(f)^2
J4(f) := m2*Vqs4(f)^2 + Js2*wq4(f)^2
J4(f) = [
    0.027848; 0.0281017; 0.0280494; 0.0276809; 0.0270028; 0.0260393; 0.0248322; 0.0234394; 0.0219316; 0.020389
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]
J2(f) = [
    0.0147856; 0.0149707; 0.0155152; 0.0163873; 0.0175363; 0.018896; 0.020389; 0.0219316; 0.0234394; 0.0248322
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]
J1 := 0.273
Jii(f) := J2(f) + J4(f) + J3(f) + J5(f)
Jii(f) = [
    0.0809246; 0.0833985; 0.0862135; 0.089124; 0.0918664; 0.094187; 0.095868; 0.0967505; 0.0967505; 0.095868
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]
Jsum(f) := J1 + J2(f) + J4(f) + J3(f) + J5(f)
# ПОСТРОЕНИЕ ИНДИКАТОРНОЙ ДИАГРАММЫ
P1max := 210*10^3
H := 2*l1 = 0.118
P2max := 630*10^3
# СТУПЕНЬ I :
# СЖАТИЕ : | f (pi;2pi)
# "начальное приближение"
x := [1; 1; 1; 1; 1; 1; 1; 1; 1; 1; 1]
Given
Sc := [0.0*H; 0.1*H; 0.2*H; 0.3*H; 0.4*H; 0.5*H; 0.6*H; 0.7*H; 0.8*H; 0.9*H; 1*H]
π ≤ x ≤ 2*π
Sc == l1*cos(x) + l2*sqrt(1 - (sin(x)*l1/l2)^2) - (l2 - l1)
# уравнение из которого нужно найти значения углов поворота, соответсвующие данному перемещению. здесь символ "=" пишется через сочетание ctrl + =
Fc1 := Find(x)  # найти значения х
# просто пример работы интерполяции
ff := 0, 0.1 .. 2*π
p1 := [0.75; 1; 1; 1; 0.75; 0.5; 0.35; 0.15; 0; -0.001; -0.013]
P1 := p1*P1max
Mnp111(ff) := interp(cspline(Fc1, P1), Fc1, P1, ff)
Fc1 = [3.14159; 3.86245; 4.16815; 4.41047; 4.62412; 4.82394; 5.01951; 5.21974; 5.43701; 5.69874; 6.28319]
P1 = [157500; 210000; 210000; 210000; 157500; 105000; 73500; 31500; 0; -210; -2730]
# f (0,pi)
# РАСШИРЕНИЕ :
p2 := [0.75; -0.019; -0.024; -0.024; -0.024; -0.023; -0.022; -0.021; -0.020; -0.019; -0.013]
a := [1; 1; 1; 1; 1; 1; 1; 1; 1; 1; 1]
P2 := p2*P1max
Given
Sc == l1 + l2 - (l1*cos(a) + l2*sqrt(1 - (sin(a)*l1/l2)^2))
Fc2 := Find(a)
P2 = [157500; -3990; -5040; -5040; -5040; -4830; -4620; -4410; -4200; -3990; -2730]
P1 = [157500; 210000; 210000; 210000; 157500; 105000; 73500; 31500; 0; -210; -2730]
Fc2 = [7.90562e-5; 0.584448; 0.846178; 1.06345; 1.26368; 1.45924; 1.65906; 1.87271; 2.11504; 2.42073; 3.14159]
d3 := 0.22
S1 := π*d3^2/4
d5 := 0.122
S2 := π*d5^2/4
350*4/(π*d3^2*10^6) = 0.00920731
# По индикаторной диаграмме находим силы
F_I_2 := P2*S1 = [5987.09; -151.673; -191.587; -191.587; -191.587; -183.604; -175.621; -167.639; -159.656; -151.673; -103.776]
Sc = [0; 0.0118; 0.0236; 0.0354; 0.0472; 0.059; 0.0708; 0.0826; 0.0944; 0.1062; 0.118]
F_I_1 := P1*S1 = [5987.09; 7982.79; 7982.79; 7982.79; 5987.09; 3991.39; 2793.98; 1197.42; 0; -7.98279; -103.776]
# СТУПЕНЬ II :
# Сжатие :
Sc := [0.0*H; 0.1*H; 0.2*H; 0.3*H; 0.4*H; 0.5*H; 0.6*H; 0.7*H; 0.8*H; 0.9*H; 1*H]
p_1 := [0.76; 1; 0.94; 0.83; 0.71; 0.6; 0.48; 0.43; 0.38; 0.35; 0.34]
P_1 := p_1*P2max = [478800; 630000; 592200; 522900; 447300; 378000; 302400; 270900; 239400; 220500; 214200]
# Расширение :
p_2 := [0.76; 0.43; 0.38; 0.333; 0.333; 0.333; 0.333; 0.333; 0.333; 0.333; 0.34]
P_2 := p_2*P2max = [478800; 270900; 239400; 209790; 209790; 209790; 209790; 209790; 209790; 209790; 214200]
b := [1; 1; 1; 1; 1; 1; 1; 1; 1; 1; 1]
# сжатие :
Given
Sc == l1*cos(π/2 - b) + l2*sqrt(1 - (sin(π/2 - b)*l1/l2)^2) - (l2 - l1)
Fd1 := Find(b)
# расширение :
Given
π/2 ≤ b ≤ 3*π/2
Sc == l1 + l2 - (l1*cos(π/2 - b) + l2*sqrt(1 - (sin(π/2 - b)*l1/l2)^2))
Fd2 := Find(b)
Fd1 + 2*π = [4.71239; 5.43325; 5.73894; 5.98127; 6.19492; 6.39474; 6.5903; 6.79054; 7.0078; 7.26953; 7.85398]
Fd2 = [1.5708; 2.15524; 2.41697; 2.63424; 2.83448; 3.03004; 3.22986; 3.44351; 3.68583; 3.99153; 4.71239]
radi := [0.111552; 0.3071174; 0.50735; 0.7246181; 0.9863481; 1.5707963; 1.5707963; 2.1552445; 2.4169746; 2.6342426; 2.8344753; 3.0300407; 3.2298589; 3.4435073; 3.685835; 3.9915309; 4.712389; 4.712389; 5.433247; 5.738943; 5.9812707; 6.1949191; 6.3947373; 6.5903027; 6.7905353; 7.0078034; 7.2695334; 7.8539816]
Fd1 = [-1.5708; -0.849938; -0.544242; -0.301915; -0.0882662; 0.111552; 0.307117; 0.50735; 0.724618; 0.986348; 1.5708]
radi*180/π = [6.39146; 17.5965; 29.069; 41.5176; 56.5136; 90; 90; 123.486; 138.482; 150.931; 162.403; 173.609; 185.057; 197.298; 211.183; 228.698; 270; 270; 311.302; 328.817; 342.702; 354.943; 366.391; 377.597; 389.069; 401.518; 416.514; 450]
F_II_2 := P_2*S2
F_II_1 := P_1*S2
200*4/(π*d5^2*10^6) = 0.0171088
F_II_2 = [5597.11; 3166.78; 2798.55; 2452.42; 2452.42; 2452.42; 2452.42; 2452.42; 2452.42; 2452.42; 2503.97]
F_II_1 = [5597.11; 7364.62; 6922.74; 6112.63; 5228.88; 4418.77; 3535.02; 3166.78; 2798.55; 2577.62; 2503.97]
# не нужно:
# и не верно
XC := l1*cos(Fc1) + l2*sqrt(1 - (sin(Fc1)*l1/l2)^2)
XC[0] = 0.206
# это не нужно.
F2 := [-103.7762301; -7.9827869; 0; 1197.418; 2793.9754; 3991.3935; 5987.0902; 7982.7869; 7982.7869; 7982.7869; 5987.0902]
# всё ещё не верно
f := 0, π/12 .. π
_F_I_2(f) := interp(cspline(Fc2, F_I_2), Fc2, F_I_2, f)
_F_I_2(f) = [5988.98; 1577.03; -32.8951; -209.792; -190.411; -189.857; -179.069; -169.093; -160.257; -153.402; -145.038; -130.164; -103.776]
Mnp_I_2(f) := integral(_F_I_2(f)*Vqc(f), f = 0 .. f)
Fc1 = [3.14159; 3.86245; 4.16815; 4.41047; 4.62412; 4.82394; 5.01951; 5.21974; 5.43701; 5.69874; 6.28319]
F_I_1 = [5987.09; 7982.79; 7982.79; 7982.79; 5987.09; 3991.39; 2793.98; 1197.42; 0; -7.98279; -103.776]
F_I_2 = [5987.09; -151.673; -191.587; -191.587; -191.587; -183.604; -175.621; -167.639; -159.656; -151.673; -103.776]
Mnp_I_2(f) = [0; -6.7775; -10.4268; -8.35425; -5.73073; -2.75208; 0.14787; 2.72788; 4.86861; 6.524; 7.68041; 8.33272; 8.52508]
_F_I_1(f) := interp(cspline(Fc1, F2), Fc1, F2, f)
Fc2 = [7.90562e-5; 0.584448; 0.846178; 1.06345; 1.26368; 1.45924; 1.65906; 1.87271; 2.11504; 2.42073; 3.14159]
Fc1 = [3.14159; 3.86245; 4.16815; 4.41047; 4.62412; 4.82394; 5.01951; 5.21974; 5.43701; 5.69874; 6.28319]
# смотри от сюда:
# Столбики F_I и fi были вписанны в ручную по найденным выше F_I_1 и F_I_2 и соответствующим углам Fc1 и Fc2. Точки должны распологаться по возрастанию
# Углы не должны быть отрицательными(в граничном значении где растяжение переходит
# в сжатие поменяй 6-7 знак после запятой на 1 больше)
# Сила на этапе "сжатия" считается отрицательной.
fi := [0.000079; 0.584448; 0.846178; 1.063446; 1.263679; 1.459244; 1.659063; 1.872711; 2.115039; 2.420735; 3.141593; 3.862451; 4.168147; 4.410474; 4.624123; 4.823941; 5.019506; 5.219739; 5.437007; 5.698737; 6.283185]
F_I := [5987.09; -151.67; -191.59; -191.59; -191.59; -183.60; -175.62; -167.64; -159.66; -151.67; -103.78; 7.9827869; 0; -1197.418; -2793.9754; -3991.3935; -5987.0902; -7982.7869; -7982.7869; -7982.7869; -5987.0902]
# МОМЕНТЫ
f := 0, π/30 .. 2*π
# ПЕРВАЯ СТУПЕНЬ:
# Ниже кубическая интерполяция, но лучше используй
# линейную(как было сделано для второй ступени)
# Дело в том что при переходе от сжатия к расширению
# будет огромный разрыв между точками и кубическая
# интерполяция сойдет с ума и сделает огромный скачек
# вверх
# (по модулю т.к знак помента определяем по знаку силы, чтобы не учитывать лишний раз знаки)
# посмотри диаграмму сил на первом листе. Видишь что это её непрерывная версия, расположенная ровно так, как идет поршень( т.е сначала рисширение, затем от конца расширение идет сжатие(от конца к началу) ).
_F_I(f) := interp(cspline(fi, F_I), fi, F_I, f)
Mnp_I(f) := _F_I(f)*|Vqc(f)|
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Mnp_I(f) = [
    0; 28.6284; 32.7427; 23.7526; 10.4744; -1.15853; -8.15302; -10.2926; -9.77497; -9.89958
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]
_F_I(f) = [
    5988.98; 3800.35; 2191.46; 1074.7; 362.453; -32.8909; -198.951; -223.344; -193.684; -183.047
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]
# МОМЕНТ ВТОРОЙ СТУПЕНИ:
Fd2 = [1.5708; 2.15524; 2.41697; 2.63424; 2.83448; 3.03004; 3.22986; 3.44351; 3.68583; 3.99153; 4.71239]
Fd1 = [-1.5708; -0.849938; -0.544242; -0.301915; -0.0882662; 0.111552; 0.307117; 0.50735; 0.724618; 0.986348; 1.5708]
F_II := [-4418.7694; -5228.8772; -6112.6311; -6922.7388; -7364.6157; -5597.108; 5597.11; 3166.78; 2798.55; 2452.42; 2452.42; 2452.42; 2452.42; 2452.42; 2452.42; 2452.42; 2503.97; -2503.97; -2577.6155; -2798.554; -3166.7848; -3535.0156]
fi_II := [0.111552; 0.307117; 0.507350; 0.724618; 0.986348; 1.570795; 1.570797; 2.1552445; 2.4169746; 2.6342426; 2.8344753; 3.0300407; 3.2298589; 3.4435073; 3.685835; 3.9915309; 4.712388; 4.712390; 5.433247; 5.738943; 5.9812707; 6.1949191]
# Здесь линейная интерполяция, она более угловатая, но всё же приблизительно верная
# Здесь понять что происходит чуть сложнее. Координаты перемещаны так чтобы соответсвовать углу фи у которого отсчет идет от оси первого поршня. Так что от 0..Пи/2 идет конец сжатия, затем от Пи/2..3пи/2 полностью идет расширение и затем от 3пи/2 до 2пи идет начало сжатия
_F_II(f) := linterp(fi_II, F_II, f)
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_F_II(f) = [
    -3956.68; -4390.47; -4824.26; -5259.96; -5722.15; -6173.22; -6563.68; -6936.95; -7113.75; -7290.55
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]
Mnp_II(f) := _F_II(f)*|Vqd(f)|
Mnp(f) := Mnp_I(f) + Mnp_II(f)
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Mnp(f) = [
    -233.444; -235.138; -258.873; -292.173; -326.471; -352.367; -363.132; -360.392; -337.608; -308.666
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]
# **** | Момент от ВНЕШНИХ СИЛ!
Js2 := 0.023
m2 := 8
G2 := m2*9.81 = 78.48  # Н
G4 := G2
m3 := 11
G3 := m3*9.81 = 107.91  # Н
G5 := G3
MnpG2(f) := G2*Vqs2(f)*|cos(acos(Vqs2_x(f)/Vqs2(f)) + 3/4*π)|
MnpG4(f) := G2*Vqs4(f)*|cos(acos(Vqs4_x(f)/Vqs4(f)) + 3/4*π)|
MnpG3(f) := G3*Vqc(f)*cos(π/4)
MnpG5(f) := G3*Vqd(f)*cos(π/4)
MnpG(f) := MnpG2(f) + MnpG3(f) + MnpG4(f) + MnpG5(f)
# ОПРЕДЕЛЕНИЕ РАБОТЫ
MnpG(f) = [
    10.068; 8.96361; 7.76054; 6.4715; 5.11034; 3.69193; 2.58237; 1.94198; 1.27288; 0.582849
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]
# переменный верхний предел чтобы получить значение работы во всех промежуточных точка, а не только в одной конечной.
(3/4*π + acos(Vqs2_x(65*π/180)/Vqs2(65*π/180)))*180/π = 297.397
Ac(f) := integral(Mnp(f), f = 0 .. f)
# приведенный момент движущих сил
Mnpd(f) := -Ac(2*π)/(2*π)
# Работа движущих сил:
cos(17.6*π/180 + π/4) = 0.4602
Mnpd(f) = [
    116.82; 116.82; 116.82; 116.82; 116.82; 116.82; 116.82; 116.82; 116.82; 116.82
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]  # Работа сил сопротивления:
Ad(f) := integral(116.8203497, f = 0 .. f)
Ac(f) = [
    0; -24.2815; -50.0142; -78.827; -111.261; -146.923; -184.494; -222.525; -259.143; -293.023
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]
cos(162.4*π/180 + 135*π/180) = 0.4602
Ad(f) = [
    0; 12.2334; 24.4668; 36.7002; 48.9336; 61.167; 73.4004; 85.6338; 97.8672; 110.101
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]
Msum(f) := Mnpd(f) + Mnp(f)
Msum(f) = [
    -116.624; -118.318; -142.053; -175.353; -209.65; -235.546; -246.312; -243.572; -220.787; -191.846
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]
# Суммарная работа за цикл:
Asum(f) := Ac(f) + Ad(f)
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Asum(f) = [
    0; -12.0481; -25.5474; -42.1268; -62.327; -85.7561; -111.093; -136.891; -161.276; -182.923
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]
Jii(f) = [
    0.0809246; 0.0833985; 0.0862135; 0.089124; 0.0918664; 0.094187; 0.095868; 0.0967505; 0.0967505; 0.095868
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]
w1 := 1450/60*2*π
w1 = 151.844
Tii(f) := Jii(f)*w1^2/2
Tnach := 2.543*151.1^2/2 = 29029.9
Tnach = 29029.9
Tii(f) - Tnach = [
    -28097; -28068.4; -28036; -28002.4; -27970.8; -27944.1; -27924.7; -27914.5; -27914.5; -27924.7
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]
29*50 = 1450
0.5*180/π = 28.6479
T(f) := Asum(f) + Tnach
144.7/50 = 2.894
T(f) = [
    29029.9; 29017.8; 29004.3; 28987.8; 28967.6; 28944.1; 28918.8; 28893; 28868.6; 28847
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]
Ti(f) := T(f) - Tii(f)
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Ti(f) - Tnach = [
    -932.919; -973.487; -1019.44; -1069.57; -1121.39; -1171.57; -1216.28; -1252.25; -1276.64; -1288.11
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]
Tii(f) = [
    932.919; 961.439; 993.891; 1027.44; 1059.06; 1085.81; 1105.19; 1115.36; 1115.36; 1105.19
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]
# МАХОВИК
Ti(f) = [
    28097; 28056.4; 28010.4; 27960.3; 27908.5; 27858.3; 27813.6; 27777.6; 27753.2; 27741.8
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]
xx := 2*π
Given
Ti(f) = [
    28097; 28056.4; 28010.4; 27960.3; 27908.5; 27858.3; 27813.6; 27777.6; 27753.2; 27741.8
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]
fmin := Minimize(Ti, xx)
TiMin := Ti(fmin) = 27740.7
Given
fmax := Maximize(Ti, xx)
TiMax := Ti(fmax) = 28620.2
Ti_nb := TiMax - TiMin = 879.51
Jneed := Ti_nb/(w1^2*0.015) = 2.54306
Jdop := Jneed - J1 = 2.27006
879.5/(w1^2*0.015) = 2.54303
J_sum(fr) := Jii(fr) + Jneed
0.200*2.543*151.2 = 76.9003
w1*79.6 = 12086.8
w1_nach := |4/76.9 - w1| = 151.792
Tnach_r := 2.543*w1^2/2 = 29316.3
fr := 0, π/6 .. 2*π
Vqc(fr) = [0; -0.0352236; -0.0568923; -0.059; -0.0452987; -0.0237764; 0; 0.0237764; 0.0452987; 0.059; 0.0568923; 0.0352236; 0]
Vqd(fr) = [0.059; 0.0568923; 0.0352236; 0; -0.0352236; -0.0568923; -0.059; -0.0452987; -0.0237764; 0; 0.0237764; 0.0452987; 0.059]
Vqs2(fr) = [0.0413; 0.0474739; 0.0567266; 0.059; 0.0535022; 0.0452897; 0.0413; 0.0452897; 0.0535022; 0.059; 0.0567266; 0.0474739; 0.0413]
Vqs4(fr) = [0.059; 0.0567266; 0.0474739; 0.0413; 0.0474739; 0.0567266; 0.059; 0.0535022; 0.0452897; 0.0413; 0.0452897; 0.0535022; 0.059]
wq2(fr) = [-0.222642; -0.194019; -0.11345; 0; 0.11345; 0.194019; 0.222642; 0.194019; 0.11345; 0; -0.11345; -0.194019; -0.222642]
wq4(fr) = [0; -0.11345; -0.194019; -0.222642; -0.194019; -0.11345; 0; 0.11345; 0.194019; 0.222642; 0.194019; 0.11345; 0]
J_sum(fr) = [2.62398; 2.63724; 2.63724; 2.62398; 2.62137; 2.62819; 2.62398; 2.61232; 2.61232; 2.62398; 2.62819; 2.62137; 2.62398]
J4(fr) = [0.027848; 0.0260393; 0.018896; 0.0147856; 0.018896; 0.0260393; 0.027848; 0.0231959; 0.0172751; 0.0147856; 0.0172751; 0.0231959; 0.027848]
J5(fr) = [0.038291; 0.035604; 0.0136477; 0; 0.0136477; 0.035604; 0.038291; 0.0225717; 0.00621851; 0; 0.00621851; 0.0225717; 0.038291]
J2(fr) = [0.0147856; 0.018896; 0.0260393; 0.027848; 0.0231959; 0.0172751; 0.0147856; 0.0172751; 0.0231959; 0.027848; 0.0260393; 0.018896; 0.0147856]
J3(fr) = [0; 0.0136477; 0.035604; 0.038291; 0.0225717; 0.00621851; 0; 0.00621851; 0.0225717; 0.038291; 0.035604; 0.0136477; 0]
Jii(fr) = [0.0809246; 0.094187; 0.094187; 0.0809246; 0.0783113; 0.0851369; 0.0809246; 0.0692612; 0.0692612; 0.0809246; 0.0851369; 0.0783113; 0.0809246]
Jsum(fr) = [0.353925; 0.367187; 0.367187; 0.353925; 0.351311; 0.358137; 0.353925; 0.342261; 0.342261; 0.353925; 0.358137; 0.351311; 0.353925]
Jsum_need(fr) := Jii(fr) + Jneed
Mnp(fr) = [-233.444; -352.367; -263.759; -10.5639; 113.204; 137.81; 144.693; 108.57; 56.2247; -194.613; -519.05; -410.834; -217.542]
_F_I(fr) = [5988.98; -32.8909; -190.414; -179.049; -160.128; -134.021; -103.78; -106.042; -53.4351; -3298.53; -8054.57; -8024.22; -5987.09]
Mnp_I(fr) = [0; -1.15853; -10.8331; -10.5639; -7.25358; -3.18654; 0; -2.5213; -2.42054; -194.613; -458.243; -282.642; 0]
_F_II(fr) = [-3956.68; -6173.22; -7180.59; 1829.11; 3419.81; 2478.31; 2452.42; 2452.42; 2466.53; 49.1161; -2557.46; -2829.92; -3687.15]
Mnp_II(fr) = [-233.444; -351.208; -252.926; 0; 120.458; 140.996; 144.693; 111.092; 58.6452; 0; -60.8073; -128.192; -217.542]
Mnpd(fr) = [116.82; 116.82; 116.82; 116.82; 116.82; 116.82; 116.82; 116.82; 116.82; 116.82; 116.82; 116.82; 116.82]
Msum(fr) = [-116.624; -235.546; -146.939; 106.256; 230.025; 254.63; 261.513; 225.391; 173.045; -77.7929; -402.23; -294.013; -100.721]
Ad(fr) = [0; 61.167; 122.334; 183.501; 244.668; 305.835; 367.002; 428.169; 489.336; 550.503; 611.67; 672.837; 734.004]
Asum(fr) = [0; -85.7561; -200.934; -209.119; -112.978; 16.5427; 153.454; 282.075; 388.777; 419.776; 291.779; 104.568; 2.87318e-8]
Ac(fr) = [0; -146.923; -323.268; -392.62; -357.646; -289.292; -213.548; -146.094; -100.559; -130.726; -319.891; -568.269; -734.004]
Tnach = 29029.9
T(fr) = [29029.9; 28944.1; 28828.9; 28820.8; 28916.9; 29046.4; 29183.3; 29312; 29418.7; 29449.7; 29321.7; 29134.5; 29029.9]
Ti(fr) = [28097; 27858.3; 27743.1; 27887.8; 28014.1; 28064.9; 28250.4; 28513.5; 28620.2; 28516.7; 28340.2; 28231.7; 28097]
Tii(fr) = [932.919; 1085.81; 1085.81; 932.919; 902.792; 981.479; 932.919; 798.46; 798.46; 932.919; 981.479; 902.792; 932.919]
# СИЛОВОЙ РАСЧЕТ
Jsum_need(fr) := Jii(fr) + Jneed
Jsum_need(fr) = [2.62398; 2.63724; 2.63724; 2.62398; 2.62137; 2.62819; 2.62398; 2.61232; 2.61232; 2.62398; 2.62819; 2.62137; 2.62398]
vtoroe_slag(f) := d/df(Jsum_need(f))
vtoroe_slag(65*π/180) = -0.0238492
dJsum_df := 28.6*tan(-40*π/180)/1000 = -0.0239982
ω1 := 151.8 - 21/76.9 = 151.527
MnpsumGraf := -101.94
Msum(65*π/180) = -101.976
Mnpd(65*π/180) = 116.82
_F_I(65*π/180) = -194.126
_F_II(65*π/180) = -6916.68
Jsum_need(65*π/180) = 2.63535
Jsum_graf := 91.866/1000 + 2.543 = 2.63487
5*tan(10*π/180)*2 = 1.76327
ε1 := MnpsumGraf/Jsum_graf - ω1^2/(2*Jsum_graf)*dJsum_df = 65.8723
Vc := Vqc(65*π/180)*ω1 = -8.88086
Vd := Vqd(65*π/180)*ω1 = 4.54402
Vb := ω1*l1 = 8.94009
Vcb := 11.591/3 = 3.86367
abn := ω1^2*l1 = 1354.66
Vdb := 24.454/3 = 8.15133
abt := ε1*l1 = 3.88647
ab := sqrt(abn^2 + abt^2) = 1354.67
acbt := 1240.2
adbt := 554.9
acb := 1241.5
acbn := Vcb^2/l2 = 56.3318
ω2 := -Vcb/l2 = -14.5799
adb := 608.78
as2 := 1002.2
adbn := Vdb^2/l2 = 250.733
ω4 := -Vdb/l2 = -30.7597
as4 := 1347
ac := 380.9
ad := 1423
ε2 := acbt/l2 = 4680
ε4 := -adbt/l2 = -2093.96
Jneed = 2.54306
J_1 := Jneed = 2.54306
Фs2 := -m2*as2 = -8017.6
Фs4 := -m4*as4 = -10776
J_2 := 0.023
Ф3 := -m3*ac = -4189.9
m2 = 8
m4 = 8
J_4 := 0.023
Ф5 := -m5*ad = -15653
m3 = 11
MФ1 := -J_1*ε1 = -167.517
G3 = 107.91
G5 = 107.91
MФ2 := -J_2*ε2 = -107.64
MФ4 := -J_4*ε4 = 48.1611
G4 = 78.48
G2 = 78.48
F21t := (8.0176*10^3*87.21/500 + 114.31 - G2*77.47/500)/0.265 = 5662.57
G2 + G3 = 186.39
F36 := (8018*37.48/500 - G2*33.2/500 - 107.64 - G3*110.54/500 + (4190 + 194.12)*26.71/500)/(129.63/500) = 2694.29
F56 := (10776*15.42/500 - (6916.67 - 15653)*12.47/500 - G5*102.08/500 - G4*30.63/500 - 48)/(131.91/500) = 1801.9
J_1*143 = 363.657
Md := 167.5 - 18930*21.221/1000 + 9315*37.362/1000 = 113.813
Mnpd(65*π/180) = 116.82
Δ
(Mnpd(65*π/180) - Md)/Mnpd(65*π/180)*100 = 2.57391
