# Дано:
G := 100  # кг/с
P6 := 10^5  # Па
α1 := 40  # *
k := 1.4
α2 := 12  # *
P*1 := 11.1*10^5  # Па
T*1 := 900  # К
R := 287  # Дж/(кг*К)
# Гидродинамические функции:
τ(λ) := 1 - (k - 1)/(k + 1)*λ^2
П(λ) := (1 - (k - 1)/(k + 1)*λ^2)^(k/(k - 1))
ε(λ) := (1 - (k - 1)/(k + 1)*λ^2)^(1/(k - 1))
q(λ) := ((k + 1)/2)^(1/(k - 1))*λ*(1 - (k - 1)/(k + 1)*λ^2)^(1/(k - 1))
# В сечении 3:
λ3 := 1
# Начальное приближение:
S3 := 1
Given
G == 0.0404*P*1/sqrt(T*1)*q(λ3)*S3
S3 := Find(S3) = 0.0668986  # -находим из уравнения выше S3
d3 := sqrt(4*S3/π) = 0.291853  # м
d_kp := d3 = 0.291853  # м  # критический диаметр
L_dz := d_kp = 0.291853  # м  # длинна дозвуквой части сопла
d1 := d3 + L_dz*tan(α1/2*π/180) = 0.398078  # м  # диаметр первого сечения
# *π/180 для перевода из градусов в радианы
# сверхзвук:
# для сечения №6:
# Начальное приближение:
λ6 := 1
Given
P6/P*1 == (1 - (k - 1)/(k + 1)*λ6^2)^(k/(k - 1))
λ6 := Find(λ6) = 1.72731
# По полученной λ6 расчитали:
# τ и q
τ(λ6) = 0.502732
# из уравнения расхода определим
# площадь сечеия(из которой определим диаметр)
q(λ6) = 0.488275
# Начальное приближение:
S6 := 1
Given
G == 0.0404*P*1/sqrt(T*1)*q(λ6)*S6
S6 := Find(S6) = 0.13701  # м^2
d6 := sqrt(4*S6/π) = 0.417668  # м
L_szv := (d6 - d3)/tan(α2/2*π/180) = 1.19705  # м  # Длинна сверхзвуковой части сопла
a_kp := sqrt(2*k/(k + 1)*R*T*1) = 548.954
# скорость звука в
# критическом сечении
λ1 := 1  # Найдем необходимые данные во всех сечениях:  # *
Given  # сечение 1:
λ1 < 1
T1 := T*1 = 900  # К
G == 0.0404*P*1/sqrt(T*1)*q(λ1)*π*d1^2/4
P1 := P*1 = 1110000  # Па
a1 := sqrt(k*R*T1) = 601.348  # м/с
λ1 := Find(λ1) = 0.359854
λ1 = 0.359854
v1 := λ1*a_kp = 197.543  # м/с
M1 := v1/a1 = 0.3285
# для сечения 2:
d2 := (d1 + d3)/2 = 0.344965  # м
S2 := π*d2^2/4 = 0.0934633  # м^2
# Начальное приближение:
λ2 := 1
Given
λ2 < 1  # (<1 Так как поток дозвуковой)
G == 0.0404*P*1/sqrt(T*1)*q(λ2)*S2
λ2 := Find(λ2) = 0.506032
T2 := T*1*τ(λ2) = 861.59  # K
P2 := P*1*П(λ2) = 952853  # Па
v2 := λ2*a_kp = 277.788  # м/с
a2 := sqrt(k*R*T2) = 588.376  # м/с
λ2 = 0.506032
M2 := v2/a2 = 0.472126
# Сечение 3:
P3 := P*1*П(λ3) = 586393  # Па
T3 := T*1*τ(λ3) = 750  # K
v3 := λ3*a_kp = 548.954  # м/с
a3 := sqrt(k*R*T3) = 548.954  # м/с
λ3 = 1
M3 := v3/a3 = 1
# Сечение 4:
d4 := tan(α2/2*π/180)*L_szv/3 + d3 = 0.333791  # м
S4 := π*d4^2/4 = 0.0875063  # м^2
# Начальное приближение:
λ4 := 1
Given
G == 0.0404*P*1/sqrt(T*1)*q(λ4)*S4
λ4 := Find(λ4) = 1.46453
T4 := T*1*τ(λ4) = 578.273  # K
P4 := P*1*П(λ4) = 236015  # Па
v4 := λ4*a_kp = 803.958  # м/с
a4 := sqrt(k*R*T4) = 482.027  # м/с
λ4 = 1.46453
M4 := v4/a4 = 1.66787
# Сечение 5:
d5 := tan(α2/2*π/180)*L_szv*2/3 + d3 = 0.375729  # м
S5 := π*d5^2/4 = 0.110877  # м^2
λ5 := 1  # начальное приближение
Given
G == 0.0404*P*1/sqrt(T*1)*q(λ5)*S5
λ5 := Find(λ5) = 1.62308
T5 := T*1*τ(λ5) = 504.843  # К
P5 := P*1*П(λ5) = 146731  # Па
v5 := λ5*a_kp = 890.994  # м/с
a5 := sqrt(k*R*T5) = 450.384  # м/с
λ5 = 1.62308
M5 := v5/a5 = 1.9783
# Сечение 6:
P6 := P*1*П(λ6) = 100000  # Па
T6 := T*1*τ(λ6) = 452.459  # К
v6 := λ6*a_kp = 948.215  # м/с
a6 := sqrt(k*R*T6) = 426.378
λ6 = 1.72731
M6 := v6/a6 = 2.22388
# Составим матрицы полученных значений
P_ := [P1; P2; P3; P4; P5; P6]
T_ := [T1; T2; T3; T4; T5; T6]
v_ := [v1; v2; v3; v4; v5; v6]
a_ := [a1; a2; a3; a4; a5; a6]
λ_ := [λ1; λ2; λ3; λ4; λ5; λ6]
M_ := [M1; M2; M3; M4; M5; M6]
# результаты измерений занесем в матрицу
L := [0; L_dz/2; L_dz; L_dz + L_szv/3; L_dz + L_szv*2/3; L_dz + L_szv]
# Расстояния от начала
# до сечений
result := [
    P1, T1, v1, a1, λ1, M1;
    P2, T2, v2, a2, λ2, M2;
    P3, T3, v3, a3, λ3, M3;
    P4, T4, v4, a4, λ4, M4;
    P5, T5, v5, a5, λ5, M5;
    P6, T6, v6, a6, λ6, M6
]
# изменения х: от 0 до L_dz+L_szv
x := 0, 0.01 .. L_dz + L_szv
# Проинтерполируем :
a(x) := interp(lspline(L, a_), L, a_, x)
P(x) := interp(lspline(L, P_), L, P_, x)
λ(x) := interp(lspline(L, λ_), L, λ_, x)
T(x) := interp(lspline(L, T_), L, T_, x)
M(x) := interp(lspline(L, M_), L, M_, x)
v(x) := interp(lspline(L, v_), L, v_, x)
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Па  # критичское сечение  # К
# ,м
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# м/с
# критичское сечение
# м/с
# м/с
# ,м
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# критичское сечение
# диапазон изменения координаты х1 от 0 до L_dz+0.02
x1 := 0, 0.01 .. L_dz + 0.02
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# увеличенные графикиλ и М в дозвуке:
# ,м
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# Задача 2:
# Основные формулы: | давление на выходе для второй задачи:
S[ck] == S[пск]
Pпск* == P*1*q(λck)/q(1/λck)
P6_2 := P*1/2 + 2*10^5 = 755000
λпск == 1/λck
# Предположим, что скачек произошел в каком-то сечении.
# Определим Рпск* в сечениях II III IV V VI:
# λ в каждом сечении:
i := 1, 2 .. 5
λ_ = [0.359854; 0.506032; 1; 1.46453; 1.62308; 1.72731]
Pпск*[i] := P*1*q(λ_[i])/q(1/λ_[i])
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# Из уравнения расхода найдем λ_6 (приведенную скорость в 6 сечении) для каждого Рпск*
G == 0.0404*Pпск*/sqrt(T*1)*q(λ_6)*S6
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λ_6 := [0.0974708367584; 0.323452594428; 0.378450659129; 0.463943558632; 0.578930560428]
# Найдем давления P6_ в 6 сечении для каждого случая(скачка в каждом сечении):
P6_[i] := Pпск*[i]*П(λ_6[i - 1])
P6_[i] = [3519186; 1043721; 886232; 714025; 560329]  # Па
# II
# III
# IV
# V
# VI
# Т.к нам задано давление при выходе P6_2:
P6_2 = 755000
# Видно что скачек произойдет между 4 и 5 сечениями
# Для повышения точности разобьем участок между 4 и 5 сечениями и по той же схеме проведем расчеты P6_ и λ_6_ для этих участков.
# Для этого определим диаметры сечений:
# длинна сверхзуковой части сопла до сечений в которых будет вестись расчет
# L_szv /3  -начало 4 сечения
# L_szv /24  -шаг
# (т.к 8 частей, а весь участок L_szv/3 то длинна одной части L_szv/24)
# (2/3)*L_szv  - 5 сечение
Ls := L_szv/3, L_szv/3 + L_szv/24 .. 2/3*L_szv
Ls = [0.399018; 0.448895; 0.498772; 0.548649; 0.598526; 0.648404; 0.698281; 0.748158; 0.798035]  # м
# Функция зависимости диаметра сечения от расстояния до него
# - расстояние до каждого сечения
# между 4 и 5 сечением
# (от критического сечения)
d_(Ls) := tan(α2/2*π/180)*Ls + d3
d_(Ls) = [0.333791; 0.339033; 0.344276; 0.349518; 0.35476; 0.360003; 0.365245; 0.370487; 0.375729]  # м
# - диаметр каждого сечения между 4 и 5 сечением
# *1 диаметр -диаметр 4 сечения
# последний - диаметр 5 сечения
# Зависимость площади от Ls:
S_(Ls) := π*d_(Ls)^2/4
# Найдем λ_i в каждом сечении из уравнения расхода:
S_(Ls) = [0.0875063; 0.0902765; 0.0930899; 0.0959464; 0.0988461; 0.101789; 0.104775; 0.107804; 0.110877]
G == 0.0404*P*1/sqrt(T*1)*q(λ_i)*S_(Ls)
λ_i := [1.46456; 1.48936; 1.51229; 1.53372; 1.55375; 1.57256; 1.59035; 1.60711; 1.62309]
# приведенная скорость в каждом из сечений
# между 4 и 5 сечениями
# Теперь, когда все необходимые параметры сечения нам известны рассчитаем давление на выходе (Р6_) и λ_6_ для каждой точки:
i := 0, 1 .. 8
Pпск*[i] := P*1*q(λ_i[i])/q(1/λ_i[i])
# Из уравнения расхода определим λ_6_(приведенную скорость на выходном сечении при расчете каждой точки)
G == 0.0404*Pпск*/sqrt(T*1)*q(λ_6_)*S6
Pпск* = [964407; 944057; 924008; 904220; 884831; 865858; 847252; 829155; 811405]
λ_6_ := [0.37845; 0.38779; 0.3975; 0.40762; 0.4181; 0.42895; 0.44022; 0.45184; 0.46394]
# Найдем получившееся давление на выходе P6_ для каждой точки
i := 0, 1 .. 8
P6__[i] := Pпск*[i]*П(λ_6_[i])
# Давление в 6 сечении для разных точек(случаев скачка)
P6__ = [886209; 863804; 841608; 819572; 797842; 776432; 755278; 734538; 714014]  # Па
P6f(x) := linterp(λ_i, P6__, x)  # -проинтерполируем точки и найдем значение λck
x := 1.46456, 1.46456 + 0.01 .. 1.62309  # -диапазон изменения λ_i(от λ4 до λ5 c шагом 0.01)
λck := 1
Given
P6f(λck) == P6_2
λck := Find(λck) = 1.59057  # λ скачка
λпск := 1/λck = 0.628703  # λ после скачка
# Найдем площадь сечения в котором произойдет скачек:
Sck := 1  # начальное приближение  # По найденной λck определим давление торможения после скачка:
Given
G == 0.0404*P*1/sqrt(T*1)*q(λck)*Sck
P*пск := P*1*q(λck)/q(1/λck) = 847013
Sck := Find(Sck) = 0.104819  # м^2
d_ck := sqrt(4*Sck/π) = 0.365322  # м  # -диаметр сечения в котором произошел скачек.
# Определим расстояние от критического сечения до сечения в котором произойдет скачек:
Xck := 1
Given
d_ck == tan(α2/2*π/180)*Xck + d3
Xck := Find(Xck) = 0.699016  # м
# Определим необходимые параметры после скачка:
Pck := P*1*П(λck) = 163297  # Па  # Давление в сечении скачка
Pпск := P*пск*П(λпск) = 667272  # Па  # Давление в сечении скачка сразу после скачка
λ5_пск := 1  # начальное приближение
Given
G == 0.0404*P*пск/sqrt(T*1)*q(λ5_пск)*S5
λ5_пск < 1  # <1 т.к после скачка дозвук.
λ5_пск := Find(λ5_пск) = 0.578626  # λ в 5 сечении после скачка
λ6_пск := 1
Given
G == 0.0404*P*пск/sqrt(T*1)*q(λ6_пск)*S6
λ6_пск < 1
λ6_пск := Find(λ6_пск) = 0.440368  # λ в 6 сечении после скачка
P5пск := P*пск*П(λ5_пск) = 692807  # Па  # давления в 5 и 6 сечениях после скачка
P6пск := P*пск*П(λ6_пск) = 755006  # Па
# координаты сечения скачка, 5 сечения и 6: | давление после скачка,в 5 и в 6 сечениях:
X := [Xck + L_dz; 2*L_szv/3 + L_dz; L_szv + L_dz] = [0.990869; 1.08989; 1.48891]
Ppsk := [Pпск; P5пск; P6пск] = [667272; 692807; 755006]  # Па
λpsk := [λпск; λ5_пск; λ6_пск] = [0.628703; 0.578626; 0.440368]  # λ после скачка, в 5 и в 6 сечениях
# Результаты вычисление по второй задаче:
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# Построим графики:
x_пск := Xck + L_dz, L_dz + Xck + 0.01 .. L_szv + L_dz  # -изменение координаты Х после скачка
Ppsk_(x_пск) := interp(pspline(X, Ppsk), X, Ppsk, x_пск)  # -интерполяция значений(чтобы была парабола а не две прямые построенные по 3 точкам)
λpsk_(x_пск) := interp(pspline(X, λpsk), X, λpsk, x_пск)
x_до := 0, 0.01 .. L_dz + Xck  # -изменение координаты Х до скачка
P*до_(x_до) := P*1  # -давление торможения до скачка
P*пск_(x_пск) := P*пск  # -давление торможения после скачка
# для построения прямых, соединяющих значения до скачка и после
ckP := [Pck; Pпск]
ck := [L_dz + Xck; L_dz + Xck]
ckλ := [λck; λпск]
ckP* := [P*1; P*пск]
Р, Па  # λ
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# критическое сечение: | сечение скачка
# Задача 3:
# Задано :
P6_3 := P6 = 100000  # Па  # давление в 6 сечении равно давлению в 6 сечении в первой задаче
λ3 := 0.8
T*3 := T*1 = 900  # К
# Размеры такие же как в первой задаче
# Прировняв уравнения расхода для 3 и 6 сечений полчим:
0.0404*P*3/sqrt(T*3)*q(λ3)*S3 == 0.0404*P*3/sqrt(T*3)*q(λ6)*S6
# Откуда:
q(λ6) == q(λ3)*S3/S6
# Откуда выразим λ6:
λ6 := 1  # начальное приближение
Given
q(λ6) == q(λ3)*S3/S6
λ6 < 1  # (до звук)
λ6 := Find(λ6) = 0.306494
P*3 := P6_3/П(λ6) = 105678  # Па
# Определим расход:
G3 := 0.0404*P*3/sqrt(T*3)*q(λ6)*S6 = 9.06234  # кг/с
# Площади сечений:
S := [π*d1^2/4; π*d2^2/4; π*d3^2/4; π*d4^2/4; π*d5^2/4; π*d6^2/4] = [0.124459; 0.0934633; 0.0668986; 0.0875063; 0.110877; 0.13701]  # м^2
# Найдем необходимые параметры:
# Из уравнения расхода найдем λ в каждом сечении
G3 == 0.0404*P*3/sqrt(T*3)*q(λi)*S
λ_ := [0.34057; 0.47544; 0.8; 0.51698; 0.38796; 0.30649]
i := 0, 1 .. 5
P_[i] := P*3*П(λ_[i])
P_ = [98699.4; 92387.8; 71208.8; 90099.6; 96687.3; 100000]
# Результаты
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# Построение графика:
P_d := [9.86994*10^4; 9.23878*10^4; 7.12088*10^4]
# значения давлений
# в сечениях до 3его
X_do := [0; L_dz/2; L_dz]
# координаты сечений
P_p := [7.12088*10^4; 9.00996*10^4; 9.66873*10^4; 1*10^5]
# значения давлнеий в сечениях
# от третьего(влючительно)
X_p := [L_dz; L_dz + L_szv/3; L_dz + 2*L_szv/3; L_dz + L_szv]
λ_d := [0.34057; 0.47544; 0.8]
# значения λ в сечениях
# до 3его
λ_p := [0.8; 0.51698; 0.38796; 0.30649]
# значения λ в сечениях
# от 3его
# изменение координаты х до 3 сечения | изменение координаты х после 3 сечения
x_d := 0, 0.01 .. L_dz
x_p := L_dz, L_dz + 0.01 .. L_dz + L_szv
P_d(x_d) := interp(pspline(X_do, P_d), X_do, P_d, x_d)
P_p(x_p) := interp(pspline(X_p, P_p), X_p, P_p, x_p)  # Интерполяция точек
λ_d(x_d) := interp(pspline(X_do, λ_d), X_do, λ_d, x_d)
λ_p(x_p) := interp(pspline(X_p, λ_p), X_p, λ_p, x_p)
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# Р,Па
λ
